Clear

New Circuit.feeder_p1udt1878-p1uhs0_1247x bus1=p1udt1878-p1uhs0_1247x pu=1.03 basekV=12.47 R1=1e-05 X1=1e-05 R0=1e-05 X0=1e-05

Redirect LineCodes.dss
Redirect Lines.dss
Redirect Transformers.dss
Redirect Regulators.dss

! Missing external CSV profiles, so skip for snapshot testing
! Redirect LoadShapes.dss

!Redirect LoadShapes.dss
Redirect Loads.dss
new monitor.m1 element=Line.l(r:p1udt1878-p1uhs0_1247) mode=0
new monitor.m2 element=Line.l(r:p1udt1878-p1uhs0_1247) mode=1
new energymeter.m3 Line.l(r:p1udt1878-p1uhs0_1247)

Set Voltagebases=[0.12, 0.208, 0.48, 7.2, 12.47]

Calcvoltagebases

Buscoords Buscoords.dss
set maxcontroliter=50

Set mode=snapshot
Solve
