Clear

New Circuit.substation_p1uhs0_69 bus1=p1uhs0_69 pu=1.0 basekV=69.0 R1=1e-05 X1=1e-05 R0=1e-05 X0=1e-05

Redirect LineCodes.dss
Redirect p1uhs0_1247--p1udt1566/LineCodes.dss
Redirect p1uhs0_1247--p1udt1746/LineCodes.dss
Redirect p1uhs0_1247--p1udt1878/LineCodes.dss
Redirect p1uhs0_1247--p1udt2580/LineCodes.dss
Redirect p1uhs0_1247--p1udt3807/LineCodes.dss
Redirect p1uhs0_1247--p1udt64/LineCodes.dss
Redirect Lines.dss
Redirect p1uhs0_1247--p1udt1566/Lines.dss
Redirect p1uhs0_1247--p1udt1746/Lines.dss
Redirect p1uhs0_1247--p1udt1878/Lines.dss
Redirect p1uhs0_1247--p1udt2580/Lines.dss
Redirect p1uhs0_1247--p1udt3807/Lines.dss
Redirect p1uhs0_1247--p1udt64/Lines.dss
Redirect Transformers.dss
Redirect p1uhs0_1247--p1udt1566/Transformers.dss
Redirect p1uhs0_1247--p1udt1746/Transformers.dss
Redirect p1uhs0_1247--p1udt1878/Transformers.dss
Redirect p1uhs0_1247--p1udt2580/Transformers.dss
Redirect p1uhs0_1247--p1udt3807/Transformers.dss
Redirect p1uhs0_1247--p1udt64/Transformers.dss
Redirect Regulators.dss
Redirect p1uhs0_1247--p1udt1566/Regulators.dss
Redirect p1uhs0_1247--p1udt1746/Regulators.dss
Redirect p1uhs0_1247--p1udt1878/Regulators.dss
Redirect p1uhs0_1247--p1udt2580/Regulators.dss
Redirect p1uhs0_1247--p1udt3807/Regulators.dss
Redirect p1uhs0_1247--p1udt64/Regulators.dss
Redirect LoadShapes.dss
Redirect p1uhs0_1247--p1udt1566/Loads.dss
Redirect p1uhs0_1247--p1udt1746/Loads.dss
Redirect p1uhs0_1247--p1udt1878/Loads.dss
Redirect p1uhs0_1247--p1udt2580/Loads.dss
Redirect p1uhs0_1247--p1udt3807/Loads.dss
Redirect p1uhs0_1247--p1udt64/Loads.dss
new monitor.m1 element=Line.sb9_p1uhs0_1247_407 mode=0
new monitor.m2 element=Line.sb9_p1uhs0_1247_407 mode=1
new energymeter.m3 Line.sb9_p1uhs0_1247_407

Set Voltagebases=[0.12, 0.208, 0.48, 7.2, 12.47, 69.0]

Calcvoltagebases

Buscoords Buscoords.dss
set maxcontroliter=50

Solve mode=yearly stepsize=15m number=35040
Export monitors m1
Plot monitor object= m1 channels=(7 9 11 )
Export monitors m2
Plot monitor object= m2 channels=(1 3 5 )
Plot Profile Phases=All
