New RegControl.sb11_p48rhs1_25_reg_507 transformer=sb11_p48rhs1_25_trans_507 winding=2 ptratio=120.28130608117205 band=1.9919999999999998 vreg = 123.60000000000001

New RegControl.sb11_p48rhs1_25_reg_508 transformer=sb11_p48rhs1_25_trans_508 winding=2 ptratio=120.28130608117205 band=1.9919999999999998 vreg = 123.60000000000001
